*HEADING
PK_M1_JOB1_NONUNIFORM_DIAG - Gate-6B Stage 12 Non-Uniform Coarse Mesh Diagnostic
** Physical Mesh: 3019 elements (2940 quads, 79 tris), 3106 nodes
** Parameters: E=210 GPa, nu=0.3, l0=0.0075 mm, Gc=0.0027 kN/mm, Companion E_scale=1e-12
** Roller BCs: Top tied in DOF 2 only to N_RP, DOF 1 free
** ==========================================================
*PREPRINT, ECHO=NO, MODEL=NO, HISTORY=NO, CONTACT=NO
** ----------------------------------------------------------
** USER ELEMENT INTERFACES (f42_mixed_uel.for)
** ----------------------------------------------------------
*USER ELEMENT, TYPE=U1, NODES=4, COORDINATES=2, PROPERTIES=6, VARIABLES=18, UNSYMM
3
*USER ELEMENT, TYPE=U2, NODES=4, COORDINATES=2, PROPERTIES=6, VARIABLES=18, UNSYMM
1, 2
*USER ELEMENT, TYPE=U3, NODES=3, COORDINATES=2, PROPERTIES=6, VARIABLES=18, UNSYMM
3
*USER ELEMENT, TYPE=U4, NODES=3, COORDINATES=2, PROPERTIES=6, VARIABLES=18, UNSYMM
1, 2
** ----------------------------------------------------------
** NODES
** ----------------------------------------------------------
*NODE
1, 0.957446814, 0.000000000
2, 0.914893627, 0.000000000
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*NSET, NSET=N_RP
3107
*NSET, NSET=N_BOTTOM
1, 2, 3, 4, 5, 6
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*NSET, NSET=N_PINNED
25
*NSET, NSET=N_TOP
49, 50, 51, 52, 53, 54
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** ----------------------------------------------------------
** LAYER 1: PHASE-FIELD USER ELEMENTS
** ----------------------------------------------------------
*ELEMENT, TYPE=U1, ELSET=PF_QUADS
80, 634, 23, 966, 916
81, 916, 914, 98, 718
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*ELEMENT, TYPE=U3, ELSET=PF_TRIS
1, 2074, 2026, 217
2, 3045, 2290, 3046
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*UEL PROPERTY, ELSET=PF_QUADS
210000.0, 0.3, 0.0075, 0.0027, 1.0e-7, 1
*UEL PROPERTY, ELSET=PF_TRIS
210000.0, 0.3, 0.0075, 0.0027, 1.0e-7, 1
** ----------------------------------------------------------
** LAYER 2: MECHANICAL USER ELEMENTS
** ----------------------------------------------------------
*ELEMENT, TYPE=U2, ELSET=MECH_QUADS
3099, 634, 23, 966, 916
3100, 916, 914, 98, 718
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*ELEMENT, TYPE=U4, ELSET=MECH_TRIS
3020, 2074, 2026, 217
3021, 3045, 2290, 3046
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*UEL PROPERTY, ELSET=MECH_QUADS
210000.0, 0.3, 0.0075, 0.0027, 1.0e-7, 2
*UEL PROPERTY, ELSET=MECH_TRIS
210000.0, 0.3, 0.0075, 0.0027, 1.0e-7, 2
** ----------------------------------------------------------
** LAYER 3: COMPANION UMAT ELEMENTS (Infinitesimal Stiffness E=2.10e-7)
** ----------------------------------------------------------
*ELEMENT, TYPE=CPE4, ELSET=UMAT_QUADS
6118, 634, 23, 966, 916
6119, 916, 914, 98, 718
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*ELEMENT, TYPE=CPE3, ELSET=UMAT_TRIS
6039, 2074, 2026, 217
6040, 3045, 2290, 3046
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*ELSET, ELSET=All_elem
UMAT_QUADS, UMAT_TRIS
*ELSET, ELSET=umatelem
All_elem
*SOLID SECTION, ELSET=All_elem, MATERIAL=COMPANION_STEEL
1.0
*MATERIAL, NAME=COMPANION_STEEL
*ELASTIC
2.10e-7, 0.3
*USER OUTPUT VARIABLES
1
** ----------------------------------------------------------
** SURFACE DEFINITIONS & KINEMATIC COUPLING
** ----------------------------------------------------------
*SURFACE, TYPE=NODE, NAME=TOP_SURF
N_TOP
*COUPLING, CONSTRAINT NAME=TOP_COUPLING, REF NODE=N_RP, SURFACE=TOP_SURF
*KINEMATIC
2
** ----------------------------------------------------------
** BOUNDARY CONDITIONS
** ----------------------------------------------------------
*BOUNDARY
N_BOTTOM, 2, 2, 0.0
N_PINNED, 1, 1, 0.0
N_RP, 1, 1, 0.0
** ----------------------------------------------------------
** STEP 1: INITIAL ELASTIC PRE-ANALYSIS DISPLACEMENT
** ----------------------------------------------------------
*STEP, NAME=Step-1, NLGEOM=NO, INC=2000
*STATIC
0.002, 1.0, 1.0e-9, 0.002
*BOUNDARY
N_RP, 2, 2, 0.005
*OUTPUT, FIELD, FREQ=1
*ELEMENT OUTPUT, ELSET=All_elem, DIRECTIONS=YES
MISESERI, MISESAVG, S, E, EVOL
*ELEMENT OUTPUT, ELSET=umatelem
SDV
*OUTPUT, HISTORY, FREQ=1
*NODE PRINT, FREQ=1, NSET=N_RP
U, RF
*END STEP
